# Лабораторная работа №1
# Тема: Теория погрешностей и машинная арифметика
# Вариант 5
# Задача 1.1.
ORIGIN := 1
# Поиск сумму ряда аналитически:
S := limit(sum(48/(5*(n^2 + 6*n + 5)), n = 0 .. ∞), N → ∞) → 5
# Вычисление значения частичных сумм:
S(N) := sum(48/(5*(n^2 + 6*n + 5)), n = 0 .. N)
x := 1, 2 .. 5
y[x] := |5 - S(10^x)|
y = [0.716044; 0.0927644; 0.00956653; 0.000959664; 9.59966e-5]
x := [1; 2; 3; 4; 5]
# Построение гистограммы:
H := histogram(x, y)
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