# Лабораторная работа №1
# Тема: Теория погрешностей и машинная арифметика
# Вариант 5
# Задача 1.2.
ORIGIN := 1
# Исходная матрица:
A := [1.3, 1, 13; 3.4, 1.4, 23; 5, 3, 1.5]
# Функция для автоматического последовательного изменения элементов главной и побочной диагонали матрицы:
getDiff(A) :=
    k ← 1
    for i ∈ 1 .. 3
        A[i, i] ← A[i, i] + rnd(rnd(0.1) + 0.05)
        B[k] ← A
        k ← k + 1
        A[i, 4 - i] ← A[i, 4 - i] + rnd(rnd(0.1) + 0.05)
        B[k] ← A
        k ← k + 1
    return B
# Функция для расчета верных цифр:
getEquals(A, B) :=
    k ← 0
    for i ∈ 1 .. 3
        for j ∈ 1 .. 3
            k ← k + 1 if A[i, j] == B[i, j]
    return k
# Последовательное изменение элементов главной и побочной диагонали:
history := getDiff(A)
history[1] = [1.31916, 1, 13; 3.4, 1.4, 23; 5, 3, 1.5]
history[2] = [1.31916, 1, 13.011; 3.4, 1.4, 23; 5, 3, 1.5]
history[3] = [1.31916, 1, 13.011; 3.4, 1.48011, 23; 5, 3, 1.5]
history[4] = [1.31916, 1, 13.011; 3.4, 1.48023, 23; 5, 3, 1.5]
history[5] = [1.31916, 1, 13.011; 3.4, 1.48023, 23; 5, 3, 1.52751]
history[6] = [1.31916, 1, 13.011; 3.4, 1.48023, 23; 5.01198, 3, 1.52751]
# Количество верных цифр:
k := 1 .. 6
count_equals[k] := getEquals(A, history[k])
count_equals = [8; 7; 6; 6; 5; 4]
# Исходный определитель матрицы:
det_before := |A|
# Относительная погрешность определителя матрицы:
det_after[k] := (|history[k]| - det_before)/det_before
det_after = [-0.0198611; -0.0193143; -0.0976191; -0.0977382; -0.0983552; -0.0976605]
