# Лабораторная работа №2
# Тема: ПОГРЕШНОСТИ РЕШЕНИЯ СИСТЕМ ЛИНЕЙНЫХ
# АЛГЕБРАИЧЕСКИХ УРАВНЕНИЙ. ТЕОРИЯ ВОЗМУЩЕНИЙ
# Вариант 5
# Задача 2.1.
ORIGIN := 1
# 1. Расчет матрицы с помощью метода Гаусса
# Исходные данные:
n := 7
N := 5
f(i, j) := N
b := matrix(n, 1, f)
c(i, j) := 0.1*N*(i + 1)*(j + 1)
a(i, j) := 135/(2 + 0.3*c(i, j))^5
A := matrix(n, n, a)
A = [
    2.93861, 2.09746, 1.52934, 1.13623, 0.858362, 0.658179, 0.511487;
    2.09746, 1.13623, 0.658179, 0.402331, 0.257036, 0.170379, 0.116524;
    1.52934, 0.658179, 0.31997, 0.170379, 0.0973619, 0.0588633, 0.0372647;
    1.13623, 0.402331, 0.170379, 0.0818597, 0.0432, 0.0245128, 0.0147359;
    0.858362, 0.257036, 0.0973619, 0.0432, 0.021478, 0.011635, 0.00673975;
    0.658179, 0.170379, 0.0588633, 0.0245128, 0.011635, 0.0060838, 0.00342723;
    0.511487, 0.116524, 0.0372647, 0.0147359, 0.00673975, 0.00342723, 0.00188919
]
b = [5; 5; 5; 5; 5; 5; 5]
x := lsolve(A, b)
x = [158.777; -4313.58; 42376.9; -188327; 410596; -427453; 169430]
# 2. Число обусловленности матрицы А
condi(A) = 349605745
condA := normi(A)*normi(A^-1)
condA = 349605745
# 3. Поиск вектора d, относительных погрещностей решений x_i
δ := 0.1
Δ := N*δ
Δ = 0.5
k := 1 .. n
i := 1 .. n
B[i, k] := if(i == k, b[i] + Δ, b[i])
B = [
    5.5, 5, 5, 5, 5, 5, 5;
    5, 5.5, 5, 5, 5, 5, 5;
    5, 5, 5.5, 5, 5, 5, 5;
    5, 5, 5, 5.5, 5, 5, 5;
    5, 5, 5, 5, 5.5, 5, 5;
    5, 5, 5, 5, 5, 5.5, 5;
    5, 5, 5, 5, 5, 5, 5.5
]
A = [
    2.93861, 2.09746, 1.52934, 1.13623, 0.858362, 0.658179, 0.511487;
    2.09746, 1.13623, 0.658179, 0.402331, 0.257036, 0.170379, 0.116524;
    1.52934, 0.658179, 0.31997, 0.170379, 0.0973619, 0.0588633, 0.0372647;
    1.13623, 0.402331, 0.170379, 0.0818597, 0.0432, 0.0245128, 0.0147359;
    0.858362, 0.257036, 0.0973619, 0.0432, 0.021478, 0.011635, 0.00673975;
    0.658179, 0.170379, 0.0588633, 0.0245128, 0.011635, 0.0060838, 0.00342723;
    0.511487, 0.116524, 0.0372647, 0.0147359, 0.00673975, 0.00342723, 0.00188919
]
X[:, k] := lsolve(A, B[:, k])
X = [
    158.845, 155.037, 214.115, -168.893, 1048.36, -945.867, 665.724;
    -4317.32, -4121.62, -6974.12, 10494.9, -42229.1, 40226.7, -23705.9;
    42432.2, 39716.4, 77276.4, -143082, 499059, -476751, 262225;
    -188655, -173519, -373786, 763184, -2468774, 2349574, -1245147;
    411486, 372681, 867279, -1869850, 5770241, -5467643, 2831042;
    -428558, -382913, -946581, 2110447, -6305693, 5951715, -3033336;
    169937, 150038, 389278, -887390, 2589875, -2436453, 1227668
]
x = [158.777; -4313.58; 42376.9; -188327; 410596; -427453; 169430]
R[i, k] := x[i] - X[i, k]
R[i, k] := |R[i, k]|
xm[i] := |x[i]|
d[k] := max(R[:, k])/max(xm)
transpose(d) = [0.00258425, 0.104199, 1.21447, 5.93726, 13.7518, 14.9237, 6.0963]
4.*Гистограмма*вектора*d
com := [0, 1, 2, 3, 4, 5]
H := histogram(transpose(com), d)
H = [0.5, 2; 1.5, 1; 2.5, 0; 3.5, 0; 4.5, 0]
H[:, 1] = [0.5; 1.5; 2.5; 3.5; 4.5]
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5.*Оценка*погрешности*решения*x^m
condi(A) = 349605745
RB[i, k] := b[i] - B[i, k]
RB[i, k] := |RB[i, k]|
bm[i] := |b[i]|
δ[k] := max(RB[:, k])/max(bm)
transpose(δ) = [0.1, 0.1, 0.1, 0.1, 0.1, 0.1, 0.1]
δx[k] := condi(A)*δ[k]
Δx[k] := max(xm)*δx[k]
δx = [34960575; 34960575; 34960575; 34960575; 34960575; 34960575; 34960575]
Δx = [1.4944e13; 1.4944e13; 1.4944e13; 1.4944e13; 1.4944e13; 1.4944e13; 1.4944e13]
macheps := 2^-49
macheps = 1.77636e-15
macheps^-0.5 = 23726566
macheps^-1 = 562949953421312
