# Лабораторная работа №2
# Тема: ПОГРЕШНОСТИ РЕШЕНИЯ СИСТЕМ ЛИНЕЙНЫХ
# АЛГЕБРАИЧЕСКИХ УРАВНЕНИЙ. ТЕОРИЯ ВОЗМУЩЕНИЙ
# Вариант 5
# Задача 2.3.
ORIGIN := 1
# 1. Расчет матрицы с помощью метода Гаусса
# Исходные данные:
n := 5
N := 5
i := 1 .. n
j := 1 .. n
k := 1 .. n
b[i] := N
A[i, j] := i^(5 - j)
A = [1, 1, 1, 1, 1; 16, 8, 4, 2, 1; 81, 27, 9, 3, 1; 256, 64, 16, 4, 1; 625, 125, 25, 5, 1]
b = [5; 5; 5; 5; 5]
x := lsolve(A, b)
x = [0; 0; 0; 0; 5]
# 2.  Для каждого найденного решения x_i вычислить отношение ||x_i||/||b_i||
calcNorm(vector, k) := sum(|vector[i]|^k, i = 1 .. rows(vector))^(1/k)
diffNorm[k] := calcNorm(x, k)/calcNorm(b, k)
diffNorm = [0.2; 0.447214; 0.584804; 0.66874; 0.72478]
# 3.  Вычислить норму неравенства:
diffА := max(diffNorm)
diffА = 0.72478
4.Вычислить число обусловленности матрицы A
cond := diffА*normi(A)
cond = 566.053
