# Лабораторная работа №3
# Тема: РЕШЕНИЕ СИСТЕМ ЛИНЕЙНЫХ АЛГЕБРАИЧЕСКИХ
# УРАВНЕНИЙ ПРЯМЫМИ МЕТОДАМИ
# Вариант 5
# Задача 3.1.
ORIGIN := 0
# Исходные данные.
A := [0, 2, -1, -10; 8, -1, 1, 0; 4, 18, 0, -3; 4, 0, -30, 3]
b := [-25; -36; -44; -104]
lsolve(A, b) = [-5; -1; 3; 2]
# Склейка матрицы:
M := augment(A, b)
# Функция поиска главного элемента:
bubble_max_row(m, col) :=
    max ← m[col, col]
    max_row ← col
    for i ∈ col + 1 .. rows(m) - 1
        max_row ← i if |m[i, col]| > |max|
        max ← m[i, col] if |m[i, col]| > |max|
    for i ∈ 0 .. rows(m)
        tempCell ← m[col, i]
        m[col, i] ← m[max_row, i]
        m[max_row, i] ← tempCell
    return m
# Прямой ход метода Гаусса:
forward_gauss(m) :=
    n ← rows(m)
    count ← cols(m) - 1
    for k ∈ 0 .. n - 2
        m ← bubble_max_row(m, k)
        for i ∈ k + 1 .. n - 1
            div ← m[i, k]/m[k, k]
            m[i, count] ← m[i, count] - div*m[k, count]
            for j ∈ k .. n - 1
                m[i, j] ← m[i, j] - div*m[k, j]
    return m
# Преобразованная матрица:
transform_A := forward_gauss(M)
transform_A = [
    8, -1, 1, 0, -36;
    0, 18.5, -0.5, -3, -26;
    0, 0, -30.4865, 3.08108, -85.2973;
    0, 0, 0, -9.77128, -19.5426
]
# Обратный ход метода Гаусса:
backward_gauss(m) := {
    n ← rows(m)
    x[n] ← 0
    for k ∈ n - 1 .. 0
        x[k] ← (m[k, n] - sum(x[j]*m[k, j], j = k + 1 .. n))/m[k, k]
    for i ∈ 0 .. n - 1
        result[i] ← x[i]
    return result
}
# Расчет X:
x := backward_gauss(transform_A)
Проверка
x = [-5; -1; 3; 2]
lsolve(A, b) = [-5; -1; 3; 2]
