# Лабораторная работа №2
# Тема: ПОГРЕШНОСТИ РЕШЕНИЯ СИСТЕМ ЛИНЕЙНЫХ
# АЛГЕБРАИЧЕСКИХ УРАВНЕНИЙ. ТЕОРИЯ ВОЗМУЩЕНИЙ
# Вариант 5
# Задача 3.2.
ORIGIN := 1
# Исходные данные:
n := 7
N := 5
f(i, j) := N
b := matrix(n, 1, f)
c(i, j) := 0.1*N*(i + 1)*(j + 1)
a(i, j) := 135/(2 + 0.3*c(i, j))^5
A := matrix(n, n, a)
A = [
    2.93861, 2.09746, 1.52934, 1.13623, 0.858362, 0.658179, 0.511487;
    2.09746, 1.13623, 0.658179, 0.402331, 0.257036, 0.170379, 0.116524;
    1.52934, 0.658179, 0.31997, 0.170379, 0.0973619, 0.0588633, 0.0372647;
    1.13623, 0.402331, 0.170379, 0.0818597, 0.0432, 0.0245128, 0.0147359;
    0.858362, 0.257036, 0.0973619, 0.0432, 0.021478, 0.011635, 0.00673975;
    0.658179, 0.170379, 0.0588633, 0.0245128, 0.011635, 0.0060838, 0.00342723;
    0.511487, 0.116524, 0.0372647, 0.0147359, 0.00673975, 0.00342723, 0.00188919
]
b = [5; 5; 5; 5; 5; 5; 5]
# LU разложение матрицы С
C := lu(A)
C = [
    0, 0, 0, 0, 0, 0, 1, 1, 0, 0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;
    1, 0, 0, 0, 0, 0, 0, 5.74522, 1, 0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;
    0, 0, 1, 0, 0, 0, 0, 2.98998, 0.216928, 1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;
    0, 1, 0, 0, 0, 0, 0, 4.10072, 0.461062, 1.31629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;
    0, 0, 0, 0, 1, 0, 0, 1.67817, 0.0430594, 0.284097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;
    0, 0, 0, 1, 0, 0, 0, 2.22143, 0.100477, 0.580406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;
    0, 0, 0, 0, 0, 1, 0, 1.28679, 0.0143114, 0.103066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]
p_ := submatrix(C, 1, rows(C), 1, cols(C)/3)
l_ := submatrix(C, 1, rows(C), 1 + cols(C)/3, 2*cols(C)/3)
u_ := submatrix(C, 1, rows(C), 1 + 2*cols(C)/3, cols(C))
p_ = [
    0, 0, 0, 0, 0, 0, 1;
    1, 0, 0, 0, 0, 0, 0;
    0, 0, 1, 0, 0, 0, 0;
    0, 1, 0, 0, 0, 0, 0;
    0, 0, 0, 0, 1, 0, 0;
    0, 0, 0, 1, 0, 0, 0;
    0, 0, 0, 0, 0, 1, 0
]
l_ = [
    1, 0, 0, 0, 0, 0, 0;
    5.74522, 1, 0, 0, 0, 0, 0;
    2.98998, 0.216928, 1, 0, 0, 0, 0;
    4.10072, 0.461062, 1.31629, 1, 0, 0, 0;
    1.67817, 0.0430594, 0.284097, -0.236001, 1, 0, 0;
    2.22143, 0.100477, 0.580406, -0.285053, 0.95525, 1, 0;
    1.28679, 0.0143114, 0.103066, -0.111045, 0.541436, -0.405552, 1
]
u_ = [
    0.511487, 0.116524, 0.0372647, 0.0147359, 0.00673975, 0.00342723, 0.00188919;
    0, 1.42801, 1.31524, 1.05157, 0.81964, 0.638488, 0.500633;
    0, 0, -0.076763, -0.101796, -0.100592, -0.0898898, -0.0769851;
    0, 0, 0, -0.00894316, -0.0160985, -0.0197371, -0.0207117;
    0, 0, 0, 0, -0.000346916, -0.000729954, -0.00100436;
    0, 0, 0, 0, 0, -1.01666e-5, -2.48877e-5;
    0, 0, 0, 0, 0, 0, -1.91874e-7
]
# Поиск x с помощью метода обратной подстановки
y := l_^-1*p_*b
transpose(y) = [5, -23.7261, -4.80307, 1.75784, -0.589827, 0.129024, -0.0325091]
x := u_^-1*y
transpose(x) = [158.777, -4313.58, 42376.9, -188327, 410596, -427453, 169430]
Проверка
transpose(lsolve(A, b)) = [158.777, -4313.58, 42376.9, -188327, 410596, -427453, 169430]
