# Лабораторная работа №3
# Тема: РЕШЕНИЕ СИСТЕМ ЛИНЕЙНЫХ АЛГЕБРАИЧЕСКИХ
# УРАВНЕНИЙ ПРЯМЫМИ МЕТОДАМИ
# Вариант 5
# Задача 3.3.
ORIGIN := 1
n := 30
m := 20
i := 1 .. n
j := 1 .. n
b[i] := m*i + n
A[i, j] :=
    (i + j)/(m + n) if i ≠ j
    n + m^2 + j/m + j/n otherwise
A =  # no stored result
transpose(b) = [50, 70, 90, 110, 130, 150, 170, 190, 210, 230, 250, 270, 290, 310, 330, 350, 370, 390, 410, 430, 450, 470, 490, 510, 530, 550, 570, 590, 610, 630]
L := cholesky(A)
L =  # no stored result
# Последовательно решаем системы  Ly = b  и  L^Tx = y :
x := 0
y := 0
x = 0
y = 0
m := rows(b)
y[1] := b[1]/L[1, 1]
i := 2 .. m
y[i] := (b[i] - sum(L[i, j]*y[j], j = 1 .. i - 1))/L[i, i]
transpose(y) = [2.41098, 3.37471, 4.33769, 5.2997, 6.26053, 7.21993, 8.17771, 9.13364, 10.0875, 11.0391, 11.9882, 12.9345, 13.878, 14.8184, 15.7554, 16.689, 17.6188, 18.5447, 19.4666, 20.3842, 21.2973, 22.2058, 23.1095, 24.0083, 24.9019, 25.7902, 26.6731, 27.5505, 28.4221, 29.2878]
x[m] := y[m]/transpose(L)[m, m]
i := m - 1 .. 1
transpose(x) = [0, 0, 0, 0, 0, 0, 0, 0, 0, 0, 0, 0, 0, 0, 0, 0, 0, 0, 0, 0, 0, 0, 0, 0, 0, 0, 0, 0, 0, 1.40838]
x[i] := (y[i] - sum(transpose(L)[i, j]*x[j], j = i + 1 .. m))/transpose(L)[i, i]
# Проверка:
transpose(x) = [0.0942209, 0.139665, 0.185099, 0.230525, 0.275941, 0.321348, 0.366746, 0.412135, 0.457515, 0.502886, 0.548247, 0.593599, 0.638943, 0.684277, 0.729602, 0.774917, 0.820224, 0.865522, 0.91081, 0.95609, 1.00136, 1.04662, 1.09187, 1.13712, 1.18235, 1.22757, 1.27279, 1.318, 1.36319, 1.40838]
x := transpose(L)^-1*y
y := L^-1*b
transpose(y) = [2.41098, 3.37471, 4.33769, 5.2997, 6.26053, 7.21993, 8.17771, 9.13364, 10.0875, 11.0391, 11.9882, 12.9345, 13.878, 14.8184, 15.7554, 16.689, 17.6188, 18.5447, 19.4666, 20.3842, 21.2973, 22.2058, 23.1095, 24.0083, 24.9019, 25.7902, 26.6731, 27.5505, 28.4221, 29.2878]
